*Heading
** Job name: InputFileTemplate
*Preprint, echo=NO, model=NO, history=NO, contact=NO
************************************************************************
** PARTS
**
*Node
      1,           0.,  0.449999988
      2,           0.,           0.
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************************************************************************
*User element, nodes=3, type=U1, properties=2, coordinates=2, variables=24
1, 2
*Element, type=U1
  1,  67,   9,  48
  2,  95,  12,  13
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************************************************************************
*ELEMENT, TYPE=CPS3, ELSET=decoy
186,67,9,48
187,95,12,13
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************************************************************************
*Nset, nset=wedge, generate
  1,  114,   1
 *Elset, elset=wedge, generate
 1,  185,  1
*Nset, nset=bottom
  2,  3, 12, 13, 14, 15, 16, 17, 18
*Nset, nset=top
  4,  5, 28, 29, 30, 31, 32, 33, 34
************************************************************************
*Uel property, elset=wedge
210e9.0, 0.25
** E,     nu
************************************************************************
*Solid Section, elset=decoy, material=decoy
1.0
*Material, name=decoy
*Depvar
8,
*User Material, constants=6
1.0e-11, 0.3
************************************************************************
*RESTART, WRITE, FREQ=0
** STEP: Step-1
*Step, name=Step-1, nlgeom=YES, inc=10000000
*Static
1e-06, 1e-2, 1e-15, 1e-04
************************************************************************
** BOUNDARY CONDITIONS
** Name: fix_bc Type: Displacement/Rotation
*Boundary
bottom, 1, 1
bottom, 2, 2
** Name: move_bc Type: Velocity/Angular velocity
*Boundary, type=VELOCITY
top, 1, 1, 0.0
top, 2, 2, 8.0
************************************************************************
*Restart, write, frequency=0
***NODE PRINT,FREQ=1
**U,CF
*Output, field, number interval=20
*element output, elset=decoy
SDV
*Node Output
RF, U
*Output, history, variable=PRESELECT
*Node Output,nset=top
RF
*End Step
